*heading
example5
*node,nset=nall
1,0,0
2,36,0
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*element,type=t2d2,elset=elall
1,1,3
2,1,4
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*solid section,elset=elall,material=steel
1
*material,name=steel
*elastic
30e6,.29
*step
*static
.2,1,1e-5,.2
*boundary
1,1,2,0
2,1,2,0
*cload
11,2,100e3
15,2,-300e3
25,1,-100e3
*end step
