*heading
example6
*node,nset=nall
1,0,0
3,-1.454545454545455,8
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*node,nset=n2
2,36,0
*transform,nset=n2
0.70710678118,0.70710678118,0,-0.70710678118,0.70710678118,0
*element,type=t2d2,elset=elall
1,1,3
2,1,4
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*solid section,elset=elall,material=steel
1
*material,name=steel
*elastic
30e6,.29
*step
*static
.2,1,1e-5,.2
*boundary
1,1,2,0
2,2,2,0
25,1,2,0
*cload
15,2,-1000e3
11,2,-200e3
*end step
